# Teaching product unit process

Dataset: EcoSpold 2, unit process
Geography: Teaching region (synthetic)
Time period: 2025-01-01 to 2025-12-31
Technology level: current
Scenario: Teaching scenario
System model: Teaching convention (not an official model)
Generated by: Teaching author
Database: Teaching master-data context (synthetic UUIDs)
isCopyrightProtected: false
accessRestrictedTo: 0

## General comment
Synthetic teaching data, not real ecoinvent data. Format and arithmetic-ratio demonstration only; no allocation or official LCI/LCIA algorithm.

## Parameters
- Electricity intensity (synthetic): 2.5 kWh/kg; name electricity_intensity

## Reference product
- Teaching product: 10 kg
  properties: Dry mass (teaching ratio) 1 kg/kg

## Inputs from technosphere
- Teaching electricity: 25 kWh; name electricity_use; = electricity_intensity * 10; lognormal variance with pedigree 0.04

## Inputs from nature
- Water, from environment (synthetic) [natural resource, in water]: 0.04 m3

## Emissions to nature
- Carbon dioxide, fossil (synthetic) [air, unspecified]: 1.5, -0.1 kg (2 entries)
- Carbon dioxide, biogenic (synthetic) [air, unspecified]: 0.2 kg
